# OpenSim document version 40000
Model jumper-scaled:
  gravity: 0 -9.80665 0
  length_units: meters
  force_units: N
  credits:
    Delp S.L., Loan J.P., Hoy M.G., Zajac F.E., Topp E.L., Rosen J.M., Thelen D.G., Anderson F.C., Seth A., Hamner S.R.
  publications:
    Notes: This model is simplified from the 3D, 23 DOF gait model created by D.G. Thelen, Univ. of Wisconsin-Madison, and Samuel Hamner, Ajay Seth, Frank C. Anderson, and Scott L. Delp, Stanford University. Lower extremity joint defintions based on Delp et al. (1990). Low back joint and anthropometry based on Anderson and Pandy (1999, 2001). Planar knee model of Yamaguchi and Zajac (1989). Seth removed the patella to avoid kinematic constraints; insertions of the quadriceps are handled with moving points in the tibia frame. Hamner added arms adapted from Holzbaur et al., 2005. Hamner, S.R., Seth, A, Delp, S.L.: Muscle contributions to propulsion and support during running. Journal of Biomechanics, 2010. Delp, S.L., Loan, J.P., Hoy, M.G., Zajac, F.E., Topp E.L., Rosen, J.M.: An interactive graphics-based model of the lower extremity to study orthopaedic surgical procedures, IEEE Transactions on Biomedical Engineering, vol. 37, pp. 757-767, 1990. Yamaguchi G.T., Zajac F.E.: A planar model of the knee joint to characterize the knee extensor mechanism." J . Biomech. vol. 21. pp. 1-10. 1989. Anderson F.C., Pandy M.G.: A dynamic optimization solution for vertical jumping in three dimensions. Computer Methods in Biomechanics and Biomedical Engineering 2:201-231, 1999. Anderson F.C., Pandy M.G.: Dynamic optimization of human walking. Journal of Biomechanical Engineering 123:381-390, 2001. Holzbaur, KR, WM Murray and SL Delp, 2005. A model of the upper extremity for simulating musculoskeletal surgery and analyzing neuromuscular control. Ann Biomed Eng 33(6): 829-840.
  Ground
  BodySet:
    Body pelvis: mass=6.706024 [kg] mass_center=(-0.06780365 0 0) inertia=(0.05455783 0.05455783 0.02825288 0 0 0)
        meshes=(sacrum.vtp pelvis.vtp l_pelvis.vtp)
    Body femur_r: mass=5.296375 mass_center=(0 -0.1617634 0) inertia=(0.06960461 0.01824587 0.07339926 0 0 0)
        meshes=femur_r.vtp
    Body tibia_r: mass=2.111113 mass_center=(0 -0.1643506 0) inertia=(0.02242228 0.002268922 0.02273372 0 0 0)
        meshes=(tibia_r.vtp fibula_r.vtp)
    Body talus_r: mass=0.0569417 mass_center=(0 0 0) inertia=(0.0004020829 0.0004020829 0.0004020829 0 0 0)
        meshes=talus_rv.vtp
    Body calcn_r: mass=0.7117712 mass_center=(0.107599 0.0322798 0) inertia=(0.0009305617 0.002592271 0.00272521 0 0 0)
        meshes=foot.vtp
    Body toes_r: mass=0.1233357 mass_center=(0.0372294 0.00645597 -0.0188299)
        inertia=(6.646838e-5 0.0001329368 0.0006646838 0 0 0) meshes=bofoot.vtp
    Body femur_l: mass=5.296375 mass_center=(0 -0.1606587 0) inertia=(0.06865723 0.01799753 0.07240024 0 0 0)
        meshes=femur_l.vtp
    Body tibia_l: mass=2.111113 mass_center=(0 -0.1620569 0) inertia=(0.02180081 0.002206034 0.02210361 0 0 0)
        meshes=(tibia_l.vtp fibula_l.vtp)
    Body talus_l: mass=0.0569417 mass_center=(0 0 0) inertia=(0.0003989774 0.0003989774 0.0003989774 0 0 0)
        meshes=talus_lv.vtp
    Body calcn_l: mass=0.7117712 mass_center=(0.107599 0.0322798 0) inertia=(0.0009305617 0.002592271 0.00272521 0 0 0)
        meshes=l_foot.vtp
    Body toes_l: mass=0.1233357 mass_center=(0.0372294 0.00645597 0.0188299)
        inertia=(6.646838e-5 0.0001329368 0.0006646838 0 0 0) meshes=l_bofoot.vtp
    Body torso: mass=15.27552 mass_center=(-0.1165126 0.3207154 -0.01661274)
        inertia=(0.8503198 0.4356833 0.8254637 0 0 0)
        meshes=(hat_spine.vtp hat_jaw.vtp hat_skull.vtp hat_ribs_scap.vtp)
    Body humerus_r: mass=1.15734 mass_center=(0 -0.1517289 0) inertia=(0.005834624 0.002012765 0.006549167 0 0 0)
        meshes=humerus_rv.vtp
    Body ulna_r: mass=0.3459208 mass_center=(0 -0.1069026 0) inertia=(0.001337826 0.0002791283 0.001451195 0 0 0)
        meshes=ulna_rv.vtp
    Body radius_r: mass=0.3459208 mass_center=(0 -0.1069026 0) inertia=(0.001337826 0.0002791283 0.001451195 0 0 0)
        meshes=radius_rv.vtp
    Body hand_r: mass=0.2605083 mass_center=(0 -0.06461477 0) inertia=(0.0004610969 0.0002827592 0.0006926817 0 0 0)
        meshes=(pisiform_rvs.vtp lunate_rvs.vtp scaphoid_rvs.vtp triquetrum_rvs.vtp hamate_rvs.vtp capitate_rvs.vtp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)
    Body humerus_l: mass=1.15734 mass_center=(0 -0.1505498 0) inertia=(0.005744295 0.001981604 0.006447776 0 0 0)
        meshes=humerus_lv.vtp
    Body ulna_l: mass=0.3459208 mass_center=(0 -0.1054647 0) inertia=(0.001302079 0.0002716699 0.001412418 0 0 0)
        meshes=ulna_lv.vtp
    Body radius_l: mass=0.3459208 mass_center=(0 -0.1054647 0) inertia=(0.001302079 0.0002716699 0.001412418 0 0 0)
        meshes=radius_lv.vtp
    Body hand_l: mass=0.2605083 mass_center=(0 -0.06461477 0) inertia=(0.0004610969 0.0002827592 0.0006926817 0 0 0)
        meshes=(pisiform_lvs.vtp lunate_lvs.vtp scaphoid_lvs.vtp triquetrum_lvs.vtp hamate_lvs.vtp capitate_lvs.vtp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)
  JointSet:
    CustomJoint ground_pelvis: socket_parent_frame=/ground socket_child_frame=/bodyset/pelvis
      Coordinate pelvis_tilt: default_value=0 range=(-1.570796 1.570796) clamped=true
      Coordinate pelvis_list: default_value=0 range=(-1.570796 1.570796) clamped=true
      Coordinate pelvis_rotation: default_value=0 range=(-1.570796 1.570796) clamped=false
      Coordinate pelvis_tx: default_value=0 range=(-5 5) clamped=false
      Coordinate pelvis_ty: default_value=1.03 range=(-1 2) clamped=false
      Coordinate pelvis_tz: default_value=0 range=(-3 3) clamped=false
      SpatialTransform:
        TransformAxis rotation1: coordinates=pelvis_tilt axis=(0 0 1) LinearFunction(coefficients=1 0)
        TransformAxis rotation2: coordinates=pelvis_list axis=(1 0 0) LinearFunction(coefficients=1 0)
        TransformAxis rotation3: coordinates=pelvis_rotation axis=(0 1 0) LinearFunction(coefficients=1 0)
        TransformAxis translation1: coordinates=pelvis_tx axis=(1 0 0) LinearFunction(coefficients=1 0)
        TransformAxis translation2: coordinates=pelvis_ty axis=(0 1 0) LinearFunction(coefficients=1 0)
        TransformAxis translation3: coordinates=pelvis_tz axis=(0 0 1) LinearFunction(coefficients=1 0)
    CustomJoint hip_r: socket_parent_frame=pelvis_offset socket_child_frame=/bodyset/femur_r
      Coordinate hip_flexion_r: default_value=0 range=(-2.094395 2.094395) clamped=true
      Coordinate hip_adduction_r: default_value=0 range=(-2.094395 2.094395) clamped=true
      Coordinate hip_rotation_r: default_value=0 range=(-2.094395 2.094395) clamped=true
      PhysicalOffsetFrame pelvis_offset: socket_parent=/bodyset/pelvis
          translation=(-0.06780365 -0.05858084 0.0815406) [meters]
      SpatialTransform: axes_held_at_zero=(translation1 translation2 translation3)
        TransformAxis rotation1: coordinates=hip_flexion_r axis=(0 0 1) LinearFunction(coefficients=1 0)
        TransformAxis rotation2: coordinates=hip_adduction_r axis=(1 0 0) LinearFunction(coefficients=1 0)
        TransformAxis rotation3: coordinates=hip_rotation_r axis=(0 1 0) LinearFunction(coefficients=1 0)
    CustomJoint knee_r: socket_parent_frame=/bodyset/femur_r socket_child_frame=/bodyset/tibia_r
      Coordinate knee_flexion_r: default_value=0 range=(-0.1745329 2.094395) clamped=true
      SpatialTransform: axes_held_at_zero=(rotation2 rotation3 translation3)
        TransformAxis rotation1: coordinates=knee_flexion_r axis=(0 0 -1) LinearFunction(coefficients=1 0)
        TransformAxis translation1: coordinates=knee_flexion_r axis=(1 0 0)
          MultiplierFunction: scale=0.9515483
            SimmSpline: x=(-2.0944 -1.52146 -0.490178 -0.337395 -0.197344 0.174533 0.349066 0.698132 1.0472 1.39626 1.74533 2.0944)
                y=(-0.00525 -0.005435 -0.005574 -0.005435 -0.005227 -0.0031 -0.001 0.00212 0.0041 0.00411 0.00179 -0.0032)
        TransformAxis translation2: coordinates=knee_flexion_r axis=(0 1 0)
          MultiplierFunction: scale=0.9515483
            SimmSpline: x=(-2.0944 -0.159149 0.174533 0.349066 0.523599 1.22173 2.0944)
                y=(-0.396 -0.395264 -0.3966 -0.3976 -0.399 -0.4082 -0.4226)
    CustomJoint ankle_r: socket_parent_frame=tibia_r_offset socket_child_frame=/bodyset/talus_r
      Coordinate ankle_flexion_r: default_value=0 range=(-1.570796 1.570796) clamped=true
      PhysicalOffsetFrame tibia_r_offset: socket_parent=/bodyset/tibia_r translation=(0 -0.3785256 0)
      SpatialTransform: axes_held_at_zero=(rotation2 rotation3 translation1 translation2 translation3)
        TransformAxis rotation1: coordinates=ankle_flexion_r axis=(-0.1050135 -0.1740224 0.9791263)
            LinearFunction(coefficients=1 0)
    CustomJoint subtalar_r: socket_parent_frame=talus_r_offset socket_child_frame=/bodyset/calcn_r
      Coordinate subtalar_angle_r: default_value=0 range=(-1.570796 1.570796) clamped=true locked=true
      PhysicalOffsetFrame talus_r_offset: socket_parent=/bodyset/talus_r
          translation=(-0.04081432 -0.0351069 0.00662804)
      SpatialTransform: axes_held_at_zero=(rotation2 rotation3 translation1 translation2 translation3)
        TransformAxis rotation1: coordinates=subtalar_angle_r axis=(0.7871796 0.6047475 -0.1209495)
            LinearFunction(coefficients=1 0)
    CustomJoint mtp_r: socket_parent_frame=calcn_r_offset socket_child_frame=/bodyset/toes_r
      Coordinate mtp_angle_r: default_value=0 range=(-1.570796 1.570796) clamped=true locked=true
      PhysicalOffsetFrame calcn_r_offset: socket_parent=/bodyset/calcn_r translation=(0.192388 -0.00215199 0.00116207)
      SpatialTransform: axes_held_at_zero=(rotation2 rotation3 translation1 translation2 translation3)
        TransformAxis rotation1: coordinates=mtp_angle_r axis=(-0.5809544 0 0.8139361) LinearFunction(coefficients=1 0)
    CustomJoint hip_l: socket_parent_frame=pelvis_offset socket_child_frame=/bodyset/femur_l
      Coordinate hip_flexion_l: default_value=0 range=(-2.094395 2.094395) clamped=true
      Coordinate hip_adduction_l: default_value=0 range=(-2.094395 2.094395) clamped=true
      Coordinate hip_rotation_l: default_value=0 range=(-2.094395 2.094395) clamped=true
      PhysicalOffsetFrame pelvis_offset: socket_parent=/bodyset/pelvis translation=(-0.06780365 -0.05858084 -0.0815406)
      SpatialTransform: axes_held_at_zero=(translation1 translation2 translation3)
        TransformAxis rotation1: coordinates=hip_flexion_l axis=(0 0 1) LinearFunction(coefficients=1 0)
        TransformAxis rotation2: coordinates=hip_adduction_l axis=(-1 0 0) LinearFunction(coefficients=1 0)
        TransformAxis rotation3: coordinates=hip_rotation_l axis=(0 -1 0) LinearFunction(coefficients=1 0)
    CustomJoint knee_l: socket_parent_frame=/bodyset/femur_l socket_child_frame=/bodyset/tibia_l
      Coordinate knee_flexion_l: default_value=0 range=(-0.1745329 2.094395) clamped=true
      SpatialTransform: axes_held_at_zero=(rotation2 rotation3 translation3)
        TransformAxis rotation1: coordinates=knee_flexion_l axis=(0 0 -1) LinearFunction(coefficients=1 0)
        TransformAxis translation1: coordinates=knee_flexion_l axis=(1 0 0)
          MultiplierFunction: scale=0.9450505
            SimmSpline: x=(-2.0944 -1.52146 -0.490178 -0.337395 -0.197344 0.174533 0.349066 0.698132 1.0472 1.39626 1.74533 2.0944)
                y=(-0.00525 -0.005435 -0.005574 -0.005435 -0.005227 -0.0031 -0.001 0.00212 0.0041 0.00411 0.00179 -0.0032)
        TransformAxis translation2: coordinates=knee_flexion_l axis=(0 1 0)
          MultiplierFunction: scale=0.9450505
            SimmSpline: x=(-2.0944 -0.159149 0.174533 0.349066 0.523599 1.22173 2.0944)
                y=(-0.396 -0.395264 -0.3966 -0.3976 -0.399 -0.4082 -0.4226)
    CustomJoint ankle_l: socket_parent_frame=tibia_l_offset socket_child_frame=/bodyset/talus_l
      Coordinate ankle_flexion_l: default_value=0 range=(-1.047198 1.047198) clamped=true
      PhysicalOffsetFrame tibia_l_offset: socket_parent=/bodyset/tibia_l translation=(0 -0.373243 0)
      SpatialTransform: axes_held_at_zero=(rotation2 rotation3 translation1 translation2 translation3)
        TransformAxis rotation1: coordinates=ankle_flexion_l axis=(0.1050135 0.1740224 0.9791263)
            LinearFunction(coefficients=1 0)
    CustomJoint subtalar_l: socket_parent_frame=talus_l_offset socket_child_frame=/bodyset/calcn_l
      Coordinate subtalar_angle_l: default_value=0 range=(-1.570796 1.570796) clamped=true locked=true
      PhysicalOffsetFrame talus_l_offset: socket_parent=/bodyset/talus_l
          translation=(-0.04065641 -0.03497107 -0.006602395)
      SpatialTransform: axes_held_at_zero=(rotation2 rotation3 translation1 translation2 translation3)
        TransformAxis rotation1: coordinates=subtalar_angle_l axis=(-0.7871796 -0.6047475 -0.1209495)
            LinearFunction(coefficients=1 0)
    CustomJoint mtp_l: socket_parent_frame=calcn_l_offset socket_child_frame=/bodyset/toes_l
      Coordinate mtp_angle_l: default_value=0 range=(-1.047198 1.047198) clamped=true locked=true
      PhysicalOffsetFrame calcn_l_offset: socket_parent=/bodyset/calcn_l translation=(0.192388 -0.00215199 -0.00116207)
      SpatialTransform: axes_held_at_zero=(rotation2 rotation3 translation1 translation2 translation3)
        TransformAxis rotation1: coordinates=mtp_angle_l axis=(0.5809544 0 0.8139361) LinearFunction(coefficients=1 0)
    CustomJoint back: socket_parent_frame=pelvis_offset socket_child_frame=/bodyset/torso
      Coordinate lumbar_extension: default_value=0 range=(-1.570796 1.570796) clamped=true
      Coordinate lumbar_bending: default_value=0 range=(-1.570796 1.570796) clamped=true
      Coordinate lumbar_rotation: default_value=0 range=(-1.570796 1.570796) clamped=true
      PhysicalOffsetFrame pelvis_offset: socket_parent=/bodyset/pelvis translation=(-0.09657439 0.07222905 0)
      SpatialTransform: axes_held_at_zero=(translation1 translation2 translation3)
        TransformAxis rotation1: coordinates=lumbar_extension axis=(0 0 1) LinearFunction(coefficients=1 0)
        TransformAxis rotation2: coordinates=lumbar_bending axis=(1 0 0) LinearFunction(coefficients=1 0)
        TransformAxis rotation3: coordinates=lumbar_rotation axis=(0 1 0) LinearFunction(coefficients=1 0)
    CustomJoint acromial_r: socket_parent_frame=torso_offset socket_child_frame=/bodyset/humerus_r
      Coordinate arm_flex_r: default_value=0 range=(-1.570796 1.570796) clamped=false locked=true
      Coordinate arm_add_r: default_value=0 range=(-2.094395 1.570796) clamped=false locked=true
      Coordinate arm_rot_r: default_value=0 range=(-1.570796 1.570796) clamped=false locked=true
      PhysicalOffsetFrame torso_offset: socket_parent=/bodyset/torso translation=(0.003162059 0.3723307 0.17038)
      SpatialTransform: axes_held_at_zero=(translation1 translation2 translation3)
        TransformAxis rotation1: coordinates=arm_flex_r axis=(0 0 1) LinearFunction(coefficients=1 0)
        TransformAxis rotation2: coordinates=arm_add_r axis=(1 0 0) LinearFunction(coefficients=1 0)
        TransformAxis rotation3: coordinates=arm_rot_r axis=(0 1 0) LinearFunction(coefficients=1 0)
    CustomJoint elbow_r: socket_parent_frame=humerus_r_offset socket_child_frame=/bodyset/ulna_r
      Coordinate elbow_flex_r: default_value=0 range=(0 2.618) clamped=true locked=true
      PhysicalOffsetFrame humerus_r_offset: socket_parent=/bodyset/humerus_r
          translation=(0.01212342 -0.2640446 -0.008849994)
      SpatialTransform: axes_held_at_zero=(rotation2 rotation3 translation1 translation2 translation3)
        TransformAxis rotation1: coordinates=elbow_flex_r axis=(0.226047 0.022269 0.9738618)
            LinearFunction(coefficients=1 0)
    CustomJoint radioulnar_r: socket_parent_frame=ulna_r_offset socket_child_frame=/bodyset/radius_r
      Coordinate pro_sup_r: default_value=0 range=(0 1.570796) clamped=true locked=true
      PhysicalOffsetFrame ulna_r_offset: socket_parent=/bodyset/ulna_r translation=(-0.005966659 -0.0115368 0.02313486)
      SpatialTransform: axes_held_at_zero=(rotation2 rotation3 translation1 translation2 translation3)
        TransformAxis rotation1: coordinates=pro_sup_r axis=(0.05639803 0.9984065 0.001952)
            LinearFunction(coefficients=1 0)
    CustomJoint radius_hand_r: socket_parent_frame=radius_r_offset socket_child_frame=/bodyset/hand_r
      Coordinate wrist_flex_r: default_value=0 range=(-1.22173 1.22173) clamped=true locked=true
      Coordinate wrist_dev_r: default_value=0 range=(-0.4363323 0.6108652) clamped=true locked=true
      PhysicalOffsetFrame radius_r_offset: socket_parent=/bodyset/radius_r
          translation=(-0.007802689 -0.2091843 0.0120717)
      SpatialTransform: axes_held_at_zero=(rotation3 translation1 translation2 translation3)
        TransformAxis rotation1: coordinates=wrist_flex_r axis=(0 0 1) LinearFunction(coefficients=1 0)
        TransformAxis rotation2: coordinates=wrist_dev_r axis=(1 0 0) LinearFunction(coefficients=1 0)
    CustomJoint acromial_l: socket_parent_frame=torso_offset socket_child_frame=/bodyset/humerus_l
      Coordinate arm_flex_l: default_value=0 range=(-1.570796 1.570796) clamped=false locked=true
      Coordinate arm_add_l: default_value=0 range=(-2.094395 1.570796) clamped=false locked=true
      Coordinate arm_rot_l: default_value=0 range=(-1.570796 1.570796) clamped=false locked=true
      PhysicalOffsetFrame torso_offset: socket_parent=/bodyset/torso translation=(0.003162059 0.3723307 -0.17038)
      SpatialTransform: axes_held_at_zero=(translation1 translation2 translation3)
        TransformAxis rotation1: coordinates=arm_flex_l axis=(0 0 1) LinearFunction(coefficients=1 0)
        TransformAxis rotation2: coordinates=arm_add_l axis=(-1 0 0) LinearFunction(coefficients=1 0)
        TransformAxis rotation3: coordinates=arm_rot_l axis=(0 -1 0) LinearFunction(coefficients=1 0)
    CustomJoint elbow_l: socket_parent_frame=humerus_l_offset socket_child_frame=/bodyset/ulna_l
      Coordinate elbow_flex_l: default_value=0 range=(0 2.618) clamped=true locked=true
      PhysicalOffsetFrame humerus_l_offset: socket_parent=/bodyset/humerus_l
          translation=(0.01202921 -0.2619927 0.008781221)
      SpatialTransform: axes_held_at_zero=(rotation2 rotation3 translation1 translation2 translation3)
        TransformAxis rotation1: coordinates=elbow_flex_l axis=(-0.226047 -0.022269 0.9738618)
            LinearFunction(coefficients=1 0)
    CustomJoint radioulnar_l: socket_parent_frame=ulna_l_offset socket_child_frame=/bodyset/radius_l
      Coordinate pro_sup_l: default_value=0 range=(0 1.570796) clamped=true locked=true
      PhysicalOffsetFrame ulna_l_offset: socket_parent=/bodyset/ulna_l
          translation=(-0.005886404 -0.01138162 -0.02282368)
      SpatialTransform: axes_held_at_zero=(rotation2 rotation3 translation1 translation2 translation3)
        TransformAxis rotation1: coordinates=pro_sup_l axis=(-0.05639803 -0.9984065 0.001952)
            LinearFunction(coefficients=1 0)
    CustomJoint radius_hand_l: socket_parent_frame=radius_l_offset socket_child_frame=/bodyset/hand_l
      Coordinate wrist_flex_l: default_value=0 range=(-1.22173 1.22173) clamped=true locked=true
      Coordinate wrist_dev_l: default_value=0 range=(-0.4363323 0.6108652) clamped=true locked=true
      PhysicalOffsetFrame radius_l_offset: socket_parent=/bodyset/radius_l
          translation=(-0.007697738 -0.2063706 -0.01190933)
      SpatialTransform: axes_held_at_zero=(rotation3 translation1 translation2 translation3)
        TransformAxis rotation1: coordinates=wrist_flex_l axis=(0 0 1) LinearFunction(coefficients=1 0)
        TransformAxis rotation2: coordinates=wrist_dev_l axis=(-1 0 0) LinearFunction(coefficients=1 0)
  ForceSet:
    Millard2012EquilibriumMuscle [values shared by the 18 below unless stated]: optimal_force=1
        max_contraction_velocity=10 activation_time_constant=0.01 [seconds] deactivation_time_constant=0.04 [seconds]
        minimum_activation=0.01
      ActiveForceLengthCurve: minimum_value=0
      ForceVelocityCurve: concentric_slope_at_vmax=0 concentric_slope_near_vmax=0.25 isometric_slope=5
          eccentric_slope_at_vmax=0 eccentric_slope_near_vmax=0.15 max_eccentric_velocity_force_multiplier=1.4
      FiberForceLengthCurve
      TendonForceLengthCurve
    Millard2012EquilibriumMuscle hamstrings_r: max_isometric_force=5400 optimal_fiber_length=0.1032545
        tendon_slack_length=0.3088161 pennation_angle_at_optimal=0 [radians]
      PathPoint bifemlh_r-P1: pelvis (-0.1207997 -0.09090188 0.0678103)
      PathPoint bifemlh_r-P2: tibia_r (-0.02649678 -0.03169054 0.02590695)
      PathPoint bifemlh_r-P3: tibia_r (-0.02059885 -0.04956047 0.03019404)
    Millard2012EquilibriumMuscle bifemsh_r: max_isometric_force=1608 optimal_fiber_length=0.1614529
        tendon_slack_length=0.08305958 pennation_angle_at_optimal=0.4014257
      PathPoint P1: femur_r (0.00475774 -0.2008715 0.02226619)
      PathPoint P2: tibia_r (-0.02649678 -0.03169054 0.02590695)
      PathPoint P3: tibia_r (-0.02059885 -0.04956047 0.03019404)
    Millard2012EquilibriumMuscle glut_max_r: max_isometric_force=3888 optimal_fiber_length=0.1464167
        tendon_slack_length=0.06840243 pennation_angle_at_optimal=0
      PathPoint P1: pelvis (-0.1263048 0.007710342 0.0451157)
      PathPoint P2: pelvis (-0.128894 -0.05397244 0.07939197)
      PathPoint P3: femur_r (-0.04281963 -0.05557038 0.02397903)
      PathPoint P4: femur_r (-0.01484416 -0.09667762 0.03986985)
    Millard2012EquilibriumMuscle iliopsoas_r: max_isometric_force=4684 optimal_fiber_length=0.09178706
        tendon_slack_length=0.1468593 pennation_angle_at_optimal=0.1396263
      PathPoint psoas_r-P1: pelvis (-0.06204945 0.07861 0.02822175)
      PathPoint psoas_r-P2: pelvis (-0.02282498 -0.05051607 0.07411869)
      ConditionalPathPoint psoas_r-P3: pelvis (-0.02762014 -0.07134282 0.07968492)
          socket_coordinate=/jointset/hip_r/hip_flexion_r range=(-1.5708 0.785398) [radians]
      PathPoint psoas_r-P4: femur_r (0.001522473 -0.04824349 0.003615883)
      PathPoint psoas_r-P5: femur_r (-0.01788909 -0.05680742 0.009896105)
    Millard2012EquilibriumMuscle rect_fem_r: max_isometric_force=2338 optimal_fiber_length=0.1082173
        tendon_slack_length=0.2942752 pennation_angle_at_optimal=0.08726646
      PathPoint P1: pelvis (-0.0282915 -0.02756224 0.09452818)
      ConditionalPathPoint P2: femur_r (0.03178172 -0.3834738 0.001807946)
          socket_coordinate=/jointset/knee_r/knee_flexion_r range=(1.45997 2.61799)
      MovingPathPoint P3: tibia_r socket_x_coordinate=/jointset/knee_r/knee_flexion_r
          socket_y_coordinate=/jointset/knee_r/knee_flexion_r socket_z_coordinate=/jointset/knee_r/knee_flexion_r
        x_location: MultiplierFunction: scale=0.8802918
          SimmSpline: x=(-2.0944 -0.174533 -0.0872665 -0.0279253 -0.00034907 -0.00017453 0 0.174533 0.349066 0.526391 0.698132 1.0472 1.39626 1.45752 1.5708 1.99997 2.0944)
              y=(0.0573481 0.0733035 0.066994 0.0633083 0.0617762 0.0617669 0.0617576 0.0534299 0.048391 0.0450902 0.0422074 0.0365695 0.0307615 0.0296564 0.0275081 0.0179938 0.0155805)
        y_location: MultiplierFunction: scale=0.8802918
          SimmSpline: x=(-2.0944 -0.174533 -0.0872665 -0.0279253 -0.00034907 -0.00017453 0 0.174533 0.349066 0.526391 0.698132 1.0472 1.39626 1.45752 1.5708 1.99997 2.0944)
              y=(-0.0673774 0.0159554 0.0191754 0.0205225 0.0209788 0.0209814 0.020984 0.0227644 0.0234197 0.0238447 0.0242373 0.0249184 0.0253146 0.0252795 0.0251141 0.0237613 0.0234116)
        z_location: MultiplierFunction: scale=0.8802918
          SimmSpline: x=(-0.1745 2.0944) y=(0.0014 0.0014)
    Millard2012EquilibriumMuscle vasti_r: max_isometric_force=10000 optimal_fiber_length=0.1026532
        tendon_slack_length=0.1112876 pennation_angle_at_optimal=0.05235988 fiber_damping=0.1
      PathPoint vas_int_r-P1: femur_r (0.0275949 -0.183078 0.02949803)
      PathPoint vas_int_r-P2: femur_r (0.03187687 -0.1983027 0.0271191)
      ConditionalPathPoint vas_int_r-P3: femur_r (0.0326381 -0.3834738 0.005233517)
          socket_coordinate=/jointset/knee_r/knee_flexion_r range=(1.42 2.61799)
      MovingPathPoint vas_int_r-P4: tibia_r socket_x_coordinate=/jointset/knee_r/knee_flexion_r
          socket_y_coordinate=/jointset/knee_r/knee_flexion_r socket_z_coordinate=/jointset/knee_r/knee_flexion_r
        x_location: MultiplierFunction: scale=0.8802918
          SimmSpline: x=(-2.0944 -0.174533 -0.0872665 -0.0279253 -0.00034907 -0.00017453 0 0.174533 0.349066 0.526391 0.698132 1.0472 1.39626 1.45752 1.5708 1.99997 2.0944)
              y=(0.0648818 0.0684368 0.061272 0.0571717 0.0554837 0.0554735 0.0554632 0.0465287 0.0412569 0.037871 0.0349465 0.0292715 0.0234583 0.022353 0.0202042 0.0106866 0.0082733)
        y_location: MultiplierFunction: scale=0.8802918
          SimmSpline: x=(-2.0944 -0.174533 -0.0872665 -0.0279253 -0.00034907 -0.00017453 0 0.174533 0.349066 0.526391 0.698132 1.0472 1.39626 1.45752 1.5708 1.99997 2.0944)
              y=(-0.0685706 0.0218288 0.0242191 0.0250526 0.0252898 0.0252911 0.0252923 0.0260129 0.0261187 0.0263073 0.0265737 0.0271363 0.0275151 0.0274796 0.0273124 0.0259487 0.025599)
        z_location: MultiplierFunction: scale=0.8802918
          SimmSpline: x=(-2.0944 2.0944) y=(0.0018 0.0018)
    Millard2012EquilibriumMuscle gastroc_r: max_isometric_force=5000 optimal_fiber_length=0.07774135
        tendon_slack_length=0.3109654 pennation_angle_at_optimal=0.296706
      PathPoint med_gas_r-P1: femur_r (-0.01807946 -0.3738635 -0.02236142)
      ConditionalPathPoint med_gas_r-P2: femur_r (-0.02854642 -0.3827127 -0.02454998)
          socket_coordinate=/jointset/knee_r/knee_flexion_r range=(-0.174533 0.785398)
      PathPoint med_gas_r-P3: calcn_r (0 0.0333558 -0.00570277)
    Millard2012EquilibriumMuscle soleus_r: max_isometric_force=10274 optimal_fiber_length=0.04262535
        tendon_slack_length=0.2131268 pennation_angle_at_optimal=0.4363323 fiber_damping=0.025
      PathPoint P1: tibia_r (-0.002112703 -0.1349489 0.006250071)
      PathPoint P2: calcn_r (0 0.0333558 -0.00570277)
    Millard2012EquilibriumMuscle tib_ant_r: max_isometric_force=6000 optimal_fiber_length=0.09042465
        tendon_slack_length=0.2057622 pennation_angle_at_optimal=0.08726646
      PathPoint P1: tibia_r (0.0157572 -0.1429595 0.01012337)
      PathPoint P2: tibia_r (0.02896162 -0.3478031 -0.01558114)
      PathPoint P3: calcn_r (0.125461 0.0191527 -0.0328178)
    Millard2012EquilibriumMuscle hamstrings_l: max_isometric_force=5400 optimal_fiber_length=0.1032545
        tendon_slack_length=0.3088161 pennation_angle_at_optimal=0
      PathPoint bifemlh_l-P1: pelvis (-0.1207997 -0.09090188 -0.0678103)
      PathPoint bifemlh_l-P2: tibia_l (-0.02612699 -0.03124828 -0.0255454)
      PathPoint bifemlh_l-P3: tibia_l (-0.02031138 -0.04886881 -0.02977265)
    Millard2012EquilibriumMuscle bifemsh_l: max_isometric_force=1608 optimal_fiber_length=0.1614529
        tendon_slack_length=0.08305958 pennation_angle_at_optimal=0.4014257
      PathPoint P1: femur_l (0.004725251 -0.1994998 -0.02211414)
      PathPoint P2: tibia_l (-0.02612699 -0.03124828 -0.0255454)
      PathPoint P3: tibia_l (-0.02031138 -0.04886881 -0.02977265)
    Millard2012EquilibriumMuscle glut_max_l: max_isometric_force=3888 optimal_fiber_length=0.1464167
        tendon_slack_length=0.06840243 pennation_angle_at_optimal=0
      PathPoint P1: pelvis (-0.1263048 0.007710342 -0.0451157)
      PathPoint P2: pelvis (-0.128894 -0.05397244 -0.07939197)
      PathPoint P3: femur_l (-0.04252723 -0.05519091 -0.02381528)
      PathPoint P4: femur_l (-0.01474279 -0.09601744 -0.03959759)
    Millard2012EquilibriumMuscle iliopsoas_l: max_isometric_force=4684 optimal_fiber_length=0.09178706
        tendon_slack_length=0.1468593 pennation_angle_at_optimal=0.1396263
      PathPoint psoas_l-P1: pelvis (-0.06204945 0.07861 -0.02822175)
      PathPoint psoas_l-P2: pelvis (-0.02282498 -0.05051607 -0.07411869)
      ConditionalPathPoint psoas_l-P3: pelvis (-0.02762014 -0.07134282 -0.07968492)
          socket_coordinate=/jointset/hip_l/hip_flexion_l range=(-1.5708 0.785398)
      PathPoint psoas_l-P4: femur_l (0.001512076 -0.04791405 -0.003591191)
      PathPoint psoas_l-P5: femur_l (-0.01776693 -0.05641949 -0.009828527)
    Millard2012EquilibriumMuscle rect_fem_l: max_isometric_force=2338 optimal_fiber_length=0.1082173
        tendon_slack_length=0.2942752 pennation_angle_at_optimal=0.08726646
      PathPoint P1: pelvis (-0.0282915 -0.02756224 -0.09452818)
      ConditionalPathPoint P2: femur_l (0.0315647 -0.3808552 -0.0017956)
          socket_coordinate=/jointset/knee_l/knee_flexion_l range=(1.45997 2.61799)
      MovingPathPoint P3: tibia_l socket_x_coordinate=/jointset/knee_l/knee_flexion_l
          socket_y_coordinate=/jointset/knee_l/knee_flexion_l socket_z_coordinate=/jointset/knee_l/knee_flexion_l
        x_location: MultiplierFunction: scale=0.8680066
          SimmSpline: x=(-2.0944 -0.174533 -0.0872665 -0.0279253 -0.00034907 -0.00017453 0 0.174533 0.349066 0.526391 0.698132 1.0472 1.39626 1.45752 1.5708 1.99997 2.0944)
              y=(0.0573481 0.0733035 0.066994 0.0633083 0.0617762 0.0617669 0.0617576 0.0534299 0.048391 0.0450902 0.0422074 0.0365695 0.0307615 0.0296564 0.0275081 0.0179938 0.0155805)
        y_location: MultiplierFunction: scale=0.8680066
          SimmSpline: x=(-2.0944 -0.174533 -0.0872665 -0.0279253 -0.00034907 -0.00017453 0 0.174533 0.349066 0.526391 0.698132 1.0472 1.39626 1.45752 1.5708 1.99997 2.0944)
              y=(-0.0673774 0.0159554 0.0191754 0.0205225 0.0209788 0.0209814 0.020984 0.0227644 0.0234197 0.0238447 0.0242373 0.0249184 0.0253146 0.0252795 0.0251141 0.0237613 0.0234116)
        z_location: MultiplierFunction: scale=0.8680066
          SimmSpline: x=(-0.1745 2.0944) y=(-0.0014 -0.0014)
    Millard2012EquilibriumMuscle vasti_l: max_isometric_force=10000 optimal_fiber_length=0.1026532
        tendon_slack_length=0.1112876 pennation_angle_at_optimal=0.05235988 fiber_damping=0.1
      PathPoint vas_int_l-P1: femur_l (0.02740647 -0.1818278 -0.0292966)
      PathPoint vas_int_l-P2: femur_l (0.03165919 -0.1969485 -0.02693391)
      ConditionalPathPoint vas_int_l-P3: femur_l (0.03241522 -0.3808552 -0.005197778)
          socket_coordinate=/jointset/knee_l/knee_flexion_l range=(1.42 2.61799)
      MovingPathPoint vas_int_l-P4: tibia_l socket_x_coordinate=/jointset/knee_l/knee_flexion_l
          socket_y_coordinate=/jointset/knee_l/knee_flexion_l socket_z_coordinate=/jointset/knee_l/knee_flexion_l
        x_location: MultiplierFunction: scale=0.8680066
          SimmSpline: x=(-2.0944 -0.174533 -0.0872665 -0.0279253 -0.00034907 -0.00017453 0 0.174533 0.349066 0.526391 0.698132 1.0472 1.39626 1.45752 1.5708 1.99997 2.0944)
              y=(0.0648818 0.0684368 0.061272 0.0571717 0.0554837 0.0554735 0.0554632 0.0465287 0.0412569 0.037871 0.0349465 0.0292715 0.0234583 0.022353 0.0202042 0.0106866 0.0082733)
        y_location: MultiplierFunction: scale=0.8680066
          SimmSpline: x=(-2.0944 -0.174533 -0.0872665 -0.0279253 -0.00034907 -0.00017453 0 0.174533 0.349066 0.526391 0.698132 1.0472 1.39626 1.45752 1.5708 1.99997 2.0944)
              y=(-0.0685706 0.0218288 0.0242191 0.0250526 0.0252898 0.0252911 0.0252923 0.0260129 0.0261187 0.0263073 0.0265737 0.0271363 0.0275151 0.0274796 0.0273124 0.0259487 0.025599)
        z_location: MultiplierFunction: scale=0.8680066
          SimmSpline: x=(-2.0944 2.0944) y=(-0.0018 -0.0018)
    Millard2012EquilibriumMuscle gastroc_l: max_isometric_force=5000 optimal_fiber_length=0.07774135
        tendon_slack_length=0.3109654 pennation_angle_at_optimal=0.296706
      PathPoint med_gas_l-P1: femur_l (-0.017956 -0.3713105 0.02220872)
      ConditionalPathPoint med_gas_l-P2: femur_l (-0.02835149 -0.3800993 0.02438233)
          socket_coordinate=/jointset/knee_l/knee_flexion_l range=(-0.174533 0.785398)
      PathPoint med_gas_l-P3: calcn_l (0 0.0333558 0.00570277)
    Millard2012EquilibriumMuscle soleus_l: max_isometric_force=10274 optimal_fiber_length=0.04262535
        tendon_slack_length=0.2131268 pennation_angle_at_optimal=0.4363323 fiber_damping=0.025
      PathPoint P1: tibia_l (-0.002083218 -0.1330656 -0.006162846)
      PathPoint P2: calcn_l (0 0.0333558 0.00570277)
    Millard2012EquilibriumMuscle tib_ant_l: max_isometric_force=6000 optimal_fiber_length=0.09042465
        tendon_slack_length=0.2057622 pennation_angle_at_optimal=0.08726646
      PathPoint P1: tibia_l (0.0155373 -0.1409644 -0.009982085)
      PathPoint P2: tibia_l (0.02855743 -0.3429492 0.01536369)
      PathPoint P3: calcn_l (0.125461 0.0191527 0.0328178)
  MarkerSet:
    Marker RSHO: torso (0 0.4189349 0.1423176) fixed=true
    Marker LSHO: torso (0 0.4189349 -0.1423176) fixed=true
    Marker CLAV: torso (0.04076456 0.3814892 -0.001142307) fixed=true
    Marker C7: torso (-0.07015656 0.440984 0) fixed=true
    Marker RUPA: humerus_r (0.008081171 -0.09906184 0.01696728) fixed=true
    Marker RELB: humerus_r (0.009223567 -0.2591812 0.03228236) fixed=true
    Marker RFRM: ulna_r (-0.03885429 -0.152726 0.02567291) fixed=true
    Marker RWRB: ulna_r (-0.03605334 -0.213459 0.0142785) fixed=true
    Marker LUPA: humerus_l (0.004363952 -0.115477 -0.01913488) fixed=true
    Marker LELB: humerus_l (0.009151892 -0.2571672 -0.0320315) fixed=true
    Marker LFRM: ulna_l (-0.02646155 -0.1245009 -0.0255372) fixed=true
    Marker LWRB: ulna_l (-0.03485408 -0.2086952 -0.01986026) fixed=true
    Marker RASI: pelvis (0.01246742 0.008862423 0.1249962) fixed=true
    Marker LASI: pelvis (0.01246742 0.008862423 -0.1249962) fixed=true
    Marker RPSI: pelvis (-0.147691 0.03367738 0.05370919) fixed=true
    Marker LPSI: pelvis (-0.147691 0.03367738 -0.05370919) fixed=true
    Marker RTHI: femur_r (0.04333341 -0.2878687 0.04482585) fixed=true
    Marker RKNE: femur_r (0 -0.3844253 0.04472276) fixed=true
    Marker RTIB: tibia_r (-0.03084379 -0.1313354 0.04324149) fixed=true
    Marker RANK: tibia_r (-0.004401458 -0.3609196 0.05281749) fixed=true
    Marker RTOE: calcn_r (0.220004 0.02182032 0.00234731) fixed=true
    Marker RHEE: calcn_r (-0.0215199 0.0215199 -0.0107599) fixed=true
    Marker LTHI: femur_l (-0.01509756 -0.2709548 -0.05046638) fixed=true
    Marker LKNE: femur_l (0 -0.3818001 -0.04441736) fixed=true
    Marker LTIB: tibia_l (0.02944363 -0.2414037 -0.03077144) fixed=true
    Marker LANK: tibia_l (-0.004340032 -0.3558827 -0.05208038) fixed=true
    Marker LTOE: calcn_l (0.226358 0.02055002 -0.00695822) fixed=true
    Marker LHEE: calcn_l (-0.0215199 0.0215199 0.0107599) fixed=true
    Marker STRN: torso (0.1099271 0.22089 -0.001546208) fixed=true
    Marker LWRA: radius_l (0.0001141782 -0.206622 -0.04391954) fixed=true
    Marker RWRA: radius_r (-0.001994703 -0.2073499 0.04388365) fixed=true
    Marker T10: torso (-0.09960523 0.2052896 0.001436409) fixed=true
    Marker RHIP6: pelvis (-0.083344 0.09525608 0.07543095) fixed=true
    Marker LHIP8: pelvis (-0.08349193 0.09555066 -0.0758215) fixed=true
    Marker RMED: tibia_r (0.008658031 -0.3570163 -0.0318777) fixed=true
    Marker RFIN: hand_r (-0.009072009 -0.08462174 0.01616404) fixed=true
    Marker LMED: tibia_l (0.00717596 -0.3533548 0.03075345) fixed=true
    Marker RMKNE: femur_r (0.00681698 -0.3714391 -0.04825367) fixed=true
    Marker LMKNE: femur_l (0.008364091 -0.3683748 0.04928872) fixed=true
    Marker LFIN: hand_l (-0.01019284 -0.08176341 -0.01728141) fixed=true
    Marker RBAK: torso (-0.06435318 0.3087396 0.1323162) fixed=true
    Marker RFRT: torso (0.03177232 0.3956516 0.07648209) fixed=true
    Marker LFHD: torso (0.08590897 0.6129947 -0.03024268) fixed=true
    Marker RFHD: torso (0.08707135 0.6131808 0.03098041) fixed=true
    Marker RBHD: torso (-0.0807474 0.599958 0.02964399) fixed=true
    Marker LBHD: torso (-0.08220427 0.6004955 -0.0224022) fixed=true
    Marker Uhead: torso (0.007417172 0.6624853 -0.001887706) fixed=true
