# OpenSim document version 40000
ForwardTool jumper-scaled:
  model_file: C:\OpenSim 4.4\Scaled_Model.osim
  replace_force_set: false
  force_set_files: CMC_reserve_actuators.xml
  results_directory: FWD
  output_precision: 8
  initial_time: 3.06
  final_time: 3.98
  solve_for_equilibrium_for_auxiliary_states: false
  maximum_number_of_integrator_steps: 20000
  maximum_integrator_step_size: 1
  minimum_integrator_step_size: 1e-8
  integrator_error_tolerance: 1e-5
  external_loads_file: jump_forces.xml
  states_file: jumper_FWD_initial_states.sto
  use_specified_dt: false
  AnalysisSet Analyses:
    Kinematics: start_time=3.06 end_time=3.98 step_interval=1 in_degrees=true
    Actuation: start_time=3.06 end_time=3.98 step_interval=1 in_degrees=true
    BodyKinematics: start_time=3.06 end_time=3.98 step_interval=1 in_degrees=true bodies=all
        express_results_in_body_local_frame=false
    OutputReporter: start_time=3.06 end_time=3.98 step_interval=1 in_degrees=true
  ControllerSet Controllers:
    ControlSetController: controls_file=Results_CMC/jumper_CMC_controls.sto
