# OpenSim document version 40000
InverseKinematicsTool:
  time_range: 3 5.1
  output_motion_file: Result_IK.mot
  marker_file: test_data_markers.trc
  IKTaskSet:
    IKMarkerTask RSHO: apply=true weight=1
    IKMarkerTask LSHO: apply=true weight=1
    IKMarkerTask CLAV: apply=true weight=1
    IKMarkerTask C7: apply=true weight=1
    IKMarkerTask RUPA: apply=true weight=1
    IKMarkerTask RELB: apply=true weight=1
    IKMarkerTask RFRM: apply=true weight=1
    IKMarkerTask RWRB: apply=true weight=1
    IKMarkerTask LUPA: apply=true weight=1
    IKMarkerTask LELB: apply=true weight=1
    IKMarkerTask LFRM: apply=true weight=1
    IKMarkerTask LWRB: apply=true weight=1
    IKMarkerTask RASI: apply=true weight=1
    IKMarkerTask LASI: apply=true weight=1
    IKMarkerTask RPSI: apply=true weight=1
    IKMarkerTask LPSI: apply=true weight=1
    IKMarkerTask RTHI: apply=true weight=1
    IKMarkerTask RKNE: apply=true weight=1
    IKMarkerTask RTIB: apply=true weight=1
    IKMarkerTask RANK: apply=true weight=1
    IKMarkerTask RTOE: apply=true weight=1
    IKMarkerTask RHEE: apply=true weight=1
    IKMarkerTask LTHI: apply=true weight=1
    IKMarkerTask LKNE: apply=true weight=1
    IKMarkerTask LTIB: apply=true weight=1
    IKMarkerTask LANK: apply=true weight=1
    IKMarkerTask LTOE: apply=true weight=1
    IKMarkerTask LHEE: apply=true weight=1
    IKMarkerTask STRN: apply=true weight=1
    IKMarkerTask LWRA: apply=true weight=1
    IKMarkerTask RWRA: apply=true weight=1
    IKMarkerTask T10: apply=true weight=1
    IKMarkerTask RHIP6: apply=true weight=1
    IKMarkerTask LHIP8: apply=true weight=1
    IKMarkerTask RMED: apply=true weight=1
    IKMarkerTask RFIN: apply=true weight=1
    IKMarkerTask LMED: apply=true weight=1
    IKMarkerTask RMKNE: apply=true weight=1
    IKMarkerTask LMKNE: apply=true weight=1
    IKMarkerTask LFIN: apply=true weight=1
    IKMarkerTask RBAK: apply=true weight=1
    IKMarkerTask RFRT: apply=true weight=1
    IKMarkerTask LFHD: apply=true weight=1
    IKMarkerTask RFHD: apply=true weight=1
    IKMarkerTask RBHD: apply=true weight=1
    IKMarkerTask LBHD: apply=true weight=1
    IKMarkerTask Uhead: apply=true weight=1
